# OpenSim document version 30000
Model gait4dof9musc.osim-scaled:
  length_units: meters
  force_units: N
  gravity: 0 -9.80665 0
  credits:
    A planar reduced gait model with 10 degrees of freedom and 18 muscles by Ajay Seth. Closely based on Delp S.L., Loan J.P., Hoy M.G., Zajac F.E., Topp E.L., Rosen J.M., Thelen D.G., Anderson F.C., Seth A. Notes: 3D, 23 DOF gait model created by D.G. Thelen, Univ. of Wisconsin-Madison, and Ajay Seth, Frank C. Anderson, and Scott L. Delp, Stanford University. Lower extremity joint defintions based on Delp et al. (1990). Low back joint and anthropometry based on Anderson and Pandy (1999, 2001). Planar knee model of Yamaguchi and Zajac (1989). Seth replaced tibia translation constraints with a CustomJoint for the knee and removed the patella to eliminate all kinematic constraints; insertions of the quadrucepts are handled with moving points in the tibia frame as defined by Delp 1990. Number of muscles was reduced by Anderson to improve simulation speed for demonstrations and is not intended to be used in research. License: Creative Commons (CCBY 3.0). You are free to distribute, remix, tweak, and build upon this work, even commercially, as long as you credit us for the original creation. http://creativecommons.org/licenses/by/3.0/ More Information: http://simtk-confluence.stanford.edu:8080/display/OpenSim/Gait+2392+and+2354+Models
  publications:
    Delp, S.L., Loan, J.P., Hoy, M.G., Zajac, F.E., Topp E.L., Rosen, J.M.: An interactive graphics-based model of the lower extremity to study orthopaedic surgical procedures, IEEE Transactions on Biomedical Engineering, vol. 37, pp. 757-767, 1990. Yamaguchi G.T., Zajac F.E.: A planar model of the knee joint to characterize the knee extensor mechanism." J . Biomech. vol. 22. pp. 1-10. 1989. Anderson F.C., Pandy M.G.: A dynamic optimization solution for vertical jumping in three dimensions. Computer Methods in Biomechanics and Biomedical Engineering 2:201-231, 1999. Anderson F.C., Pandy M.G.: Dynamic optimization of human walking. Journal of Biomechanical Engineering 123:381-390, 2001.
  BodySet:
    Body ground: mass=0 mass_center=(0 0 0) inertia_xx=0 inertia_yy=0 inertia_zz=0
    Body platform_foot: mass=2000 mass_center=(0 0 0) inertia_xx=0 inertia_yy=0 inertia_zz=0
        meshes=(talus.vtp foot.vtp bofoot.vtp)
      SliderJoint: parent_body=ground location_in_parent=(0 0 0) location=(0 0 0)
        Coordinate plat_trans: motion_type=translational default_value=0 range=(-1 1) clamped=false
    Body tibia: mass=10.54 mass_center=(0 -0.201878 0) inertia_xx=0.07439761 inertia_yy=0.00752833 inertia_zz=0.17
        meshes=(tibia_l.vtp fibula.vtp)
      PinJoint ankle: parent_body=platform_foot location_in_parent=(0 0 0) location=(0 -0.46483 0) reverse=true
        Coordinate ankle_angle: motion_type=rotational default_value=0 range=(-1.570796 1.570796) clamped=false
    Body femur: mass=26.37 mass_center=(0 -0.183663 0) inertia_xx=0.196743 inertia_yy=0.05157342 inertia_zz=0.466
        meshes=femur_l.vtp
      CustomJoint knee: parent_body=tibia location_in_parent=(0 0 0) location=(0 0 0) reverse=true
        Coordinate knee_angle: motion_type=rotational default_value=0 range=(-2.094395 0.1745329) clamped=false
        SpatialTransform: axes_held_at_zero=(rotation2 rotation3 translation1 translation3)
          TransformAxis rotation1: coordinates=knee_angle axis=(0 0 1) LinearFunction(coefficients=1 0)
          TransformAxis translation2: axis=(0 1 0) MultiplierFunction(scale=1.081, Constant(value=-0.395))
    Body pelvis: mass=9.372725 mass_center=(-0.0630109 0 0) inertia_xx=0.05772735 inertia_yy=0.04891101
        inertia_zz=0.03660173 meshes=(sacrum.vtp pelvis.vtp l_pelvis.vtp)
      PinJoint hip: parent_body=femur location_in_parent=(0 0 0) location=(-0.0629937 -0.0588951 0) reverse=true
        Coordinate hip_flexion: motion_type=rotational default_value=0 range=(-2.094395 2.094395) clamped=false
    Body torso: mass=24.21719 mass_center=(-0.02673 0.28512 0) inertia_xx=0.8280056 inertia_yy=0.4242511
        inertia_zz=0.8038028 meshes=(hat_spine.vtp hat_jaw.vtp hat_skull.vtp hat_ribs.vtp)
      WeldJoint back: parent_body=pelvis location_in_parent=(-0.0897237 0.0726165 0) location=(0 0 0)
  ForceSet:
    PathActuator hamstrings: min_control=0 max_control=1 optimal_force=5400
      PathPoint bifemlh-P1: pelvis (-0.11223 -0.0913899 -0.0125631)
      PathPoint bifemlh-P2: tibia (-0.0325381 -0.038916 0.0318138)
      PathPoint bifemlh-P3: tibia (-0.0252954 -0.0608603 0.0370783)
    PathActuator bifemsh: min_control=0 max_control=1 optimal_force=1608
      PathPoint P1: femur (0.0054 -0.227988 0.025272)
      PathPoint P2: tibia (-0.0325381 -0.038916 0.0318138)
      PathPoint P3: tibia (-0.0252954 -0.0608603 0.0370783)
    PathActuator glut_max: min_control=0 max_control=1 optimal_force=3888
      PathPoint P1: pelvis (-0.117345 0.0077517 -0.0332343)
      PathPoint P2: pelvis (-0.11975 -0.0542619 -0.0019602)
      PathPoint P3: femur (-0.0486 -0.063072 0.027216)
      PathPoint P4: femur (-0.016848 -0.109728 0.045252)
    PathActuator iliopsoas: min_control=0 max_control=1 optimal_force=4684
      PathPoint psoas-P1: pelvis (-0.0576477 0.0790317 -0.0486486)
      PathPoint psoas-P2: pelvis (-0.0212058 -0.050787 -0.0067716)
      ConditionalPathPoint psoas-P3: pelvis (-0.0256608 -0.0717255 -0.0016929) range=(-0.785398 1.5708)
          coordinate=hip_flexion
      PathPoint psoas-P4: femur (0.001728 -0.054756 0.004104)
      PathPoint psoas-P5: femur (-0.020304 -0.064476 0.011232)
    PathActuator rect_fem: min_control=0 max_control=1 optimal_force=2338
      PathPoint P1: pelvis (-0.0262845 -0.0277101 0.0118503)
      ConditionalPathPoint P2: femur (0.036072 -0.43524 0.002052) range=(-2.61799 -1.45997) coordinate=knee_angle
      MovingPathPoint P3: tibia (0.06676 0.0226837 0.0015134) x_coordinate=knee_angle y_coordinate=knee_angle
          z_coordinate=knee_angle
        x_location: MultiplierFunction: scale=1.081
          SimmSpline: x=(-2.0944 -1.99997 -1.5708 -1.45752 -1.39626 -1.0472 -0.698132 -0.526391 -0.349066 -0.174533 0 0.00017453 0.00034907 0.0279253 0.0872665 0.174533 2.0944)
              y=(0.0155805 0.0179938 0.0275081 0.0296564 0.0307615 0.0365695 0.0422074 0.0450902 0.048391 0.0534299 0.0617576 0.0617669 0.0617762 0.0633083 0.066994 0.0733035 0.0573481)
        y_location: MultiplierFunction: scale=1.081
          SimmSpline: x=(-2.0944 -1.99997 -1.5708 -1.45752 -1.39626 -1.0472 -0.698132 -0.526391 -0.349066 -0.174533 0 0.00017453 0.00034907 0.0279253 0.0872665 0.174533 2.0944)
              y=(0.0234116 0.0237613 0.0251141 0.0252795 0.0253146 0.0249184 0.0242373 0.0238447 0.0234197 0.0227644 0.020984 0.0209814 0.0209788 0.0205225 0.0191754 0.0159554 -0.0673774)
        z_location: MultiplierFunction: scale=1.081
          SimmSpline: x=(-2.0944 0.1745) y=(0.0014 0.0014)
    PathActuator vasti: min_control=0 max_control=1 optimal_force=10000
      PathPoint vas_int-P1: femur (0.03132 -0.207792 0.03348)
      PathPoint vas_int-P2: femur (0.03618 -0.225072 0.03078)
      ConditionalPathPoint vas_int-P3: femur (0.037044 -0.43524 0.00594) range=(-2.61799 -1.42) coordinate=knee_angle
      MovingPathPoint vas_int-P4: tibia (0.0599557 0.027341 0.0019458) x_coordinate=knee_angle y_coordinate=knee_angle
          z_coordinate=knee_angle
        x_location: MultiplierFunction: scale=1.081
          SimmSpline: x=(-2.0944 -1.99997 -1.5708 -1.45752 -1.39626 -1.0472 -0.698132 -0.526391 -0.349066 -0.174533 0 0.00017453 0.00034907 0.0279253 0.0872665 0.174533 2.0944)
              y=(0.0082733 0.0106866 0.0202042 0.022353 0.0234583 0.0292715 0.0349465 0.037871 0.0412569 0.0465287 0.0554632 0.0554735 0.0554837 0.0571717 0.061272 0.0684368 0.0648818)
        y_location: MultiplierFunction: scale=1.081
          SimmSpline: x=(-2.0944 -1.99997 -1.5708 -1.45752 -1.39626 -1.0472 -0.698132 -0.526391 -0.349066 -0.174533 0 0.00017453 0.00034907 0.0279253 0.0872665 0.174533 2.0944)
              y=(0.025599 0.0259487 0.0273124 0.0274796 0.0275151 0.0271363 0.0265737 0.0263073 0.0261187 0.0260129 0.0252923 0.0252911 0.0252898 0.0250526 0.0242191 0.0218288 -0.0685706)
        z_location: MultiplierFunction: scale=1.081
          SimmSpline: x=(-2.0944 2.0944) y=(0.0018 0.0018)
    PathActuator gastroc: min_control=0 max_control=1 optimal_force=5000
      PathPoint med_gas-P1: femur (-0.02052 -0.424332 -0.02538)
      ConditionalPathPoint med_gas-P2: femur (-0.0324 -0.434376 -0.027864) range=(-0.785398 0.174533)
          coordinate=knee_angle
      PathPoint med_gas-P3: platform_foot (-0.04877 -0.01095 -0.0053)
    PathActuator soleus: min_control=0 max_control=1 optimal_force=10274
      PathPoint P1: tibia (-0.0025944 -0.165717 0.0076751)
      PathPoint P2: platform_foot (-0.04877 -0.01095 -0.0053)
    PathActuator tib_ant: min_control=0 max_control=1 optimal_force=6000
      PathPoint P1: tibia (0.0193499 -0.175554 0.0124315)
      PathPoint P2: tibia (0.0355649 -0.427103 -0.0191337)
      PathPoint P3: platform_foot (0.0678 -0.0242 -0.0305)
    PointActuator FX: body=platform_foot point=(0 0 0) point_is_global=true direction=(1 0 0) force_is_global=true
        optimal_force=10000
